// COMSOL Multiphysics 5.2.0.166 model "Mesh.mph"
// Modeling of a 3D Inductor
// modeldescr_acdc/inductor_3d
// Inductors are important parts of many applications. This example shows how to extract both DC and AC properties of an inductor.
// Outline of the model tree

Selections
  sel1: Explicit "Winding" on domains 2, 3, 5
  sel2: Explicit "Gap" on domains 4
  sel3: Explicit "Core" on domains 1
  sel4: Explicit "Infinite Elements" on no domains
  sel5: Explicit "Non-conducting" on domains 1, 4
  sel6: Explicit "Non-conducting without IE" on domains 1, 4
  sel7: Explicit "Conductor Boundaries" on boundaries adjacent to domains 2, 3, 5

Coordinate systems
  ie1: InfiniteElement "Infinite Element Domain 1" on selection sel4 | ScalingType = Spherical

Geometry
  geom1 "Geometry 1" (3D, length unit m)
    imp1: Import | filename = inductor_3d.mphbin
    fin: Finalize "Form Union"

Materials
  mat1: Common "Copper" on selection sel1
    def "Basic"
      relpermeability = 1
      electricconductivity = 5.998e7[S/m]
      heatcapacity = 385[J/(kg*K)]
      relpermittivity = 1
      emissivity = 0.5
      density = 8700[kg/m^3]
      thermalconductivity = 400[W/(m*K)]
    linzRes "Linearized resistivity"
      rho0 = 1.72e-8[ohm*m]
      alpha = 3.9e-3[1/K]
      Tref = 273.15[K]
  mat2: Common "Air" on selection sel5
    def "Basic"
      relpermeability = 1
      relpermittivity = 1
      dynamicviscosity = eta(T[1/K])[Pa*s]
      ratioofspecificheat = 1.4
      electricconductivity = 0[S/m]
      heatcapacity = Cp(T[1/K])[J/(kg*K)]
      density = rho(pA[1/Pa],T[1/K])[kg/m^3]
      thermalconductivity = k(T[1/K])[W/(m*K)]
      soundspeed = cs(T[1/K])[m/s]
      eta: Piecewise | arg = T; extrap = constant; pieces = {200.0, 1600.0, -8.38278E-7+8.35717342E-8*T^1-7.69429583E-11*T^2+4.6437266E-14*T^3-1.06585607E-17*T^4}
      Cp: Piecewise | arg = T; extrap = constant; pieces = {200.0, 1600.0, 1047.63657-0.372589265*T^1+9.45304214E-4*T^2-6.02409443E-7*T^3+1.2858961E-10*T^4}
      rho: Analytic | expr = pA*0.02897/8.314/T; args = {pA, T}; dermethod = manual; argders = {{pA, d(pA*0.02897/8.314/T,pA)}, {T, d(pA*0.02897/8.314/T,T)}}
      k: Piecewise | arg = T; extrap = constant; pieces = {200.0, 1600.0, -0.00227583562+1.15480022E-4*T^1-7.90252856E-8*T^2+4.11702505E-11*T^3-7.43864331E-15*T^4}
      cs: Analytic | expr = sqrt(1.4*287*T); args = T; dermethod = manual; argders = {T, d(sqrt(1.4*287*T),T)}
    RefractiveIndex
      n = 1
      ki = 0
  mat3: Common "Core" on selection sel3
    def "Basic"
      electricconductivity = 0
      relpermittivity = 1
      relpermeability = 1e3
  mat4: Common "Copper 1" on selection sel7
    // same settings as mat1

Physics
  mf: InductionCurrents "Magnetic Fields" on selection sel6
    dependent variable A = {Ax, Ay, Az}
    MeshControl.EnableMeshControl = 1
    al1: AmperesLaw "Ampère's Law 1" (default)
    mi1: MagneticInsulation (default)
    init1: init "Initial Values 1" (default)
    stcd1: SingleTurnCoilDomain "Single-Turn Coil 1" (disabled) on selection sel1
      stcdp1: SingleTurnCoilDomainPotential "Boundary Feed 1" on boundaries 46 | CoilExcitation = CircuitCurrent
      stcdg1: SingleTurnCoilDomainGround "Ground 1" on boundaries 51
    al2: AmperesLaw "Ampère's Law 2" on selection sel3 | epsilonr_mat = userdef; epsilonr = 1-5e-4*j
    imp1: Impedance "Impedance Boundary Condition 1" on selection sel7
    lport1: LumpedPort on boundaries 47-50
      PortType = UserDefined
      TerminalType = Current
      hPort = 0.024
      wPort = 0.046
      ahPort = {1, 0, 0}
  cir: Circuit "Electrical Circuit"
    dependent variable voltages
    gnd1: GroundNode
    V1: VoltageSource | Connections = {1, 0}
    R1: Resistor | R = 100[mohm]; Connections = {1, 2}
    IvsU1: ModelDeviceIV "External I Vs. U 1" | V_src = userdef; V = 0; Connections = {2, 0}

Mesh
  mesh1 "Mesh 1" (physics-controlled)
    size: MeshSizeDefault | hauto = 5

Studies
  std1 "Study 1"
    stat: Stationary
  std2 "Study 2"
    freq: Frequency "Frequency Domain" | punit = Hz; plist = range(1000000,1000000,10000000); solve for = {mf}

Solver configurations
  sol1 "Solution 1" (study std1)
    v1: Variables "Dependent Variables 1"
    s1: Stationary "Stationary Solver 1"
      dDef: Direct
      se1: Segregated
        ss1: SegregatedStep | segvar = {comp1_currents}; linsolver = dDef
        ss2: SegregatedStep | segvar = {comp1_A}; linsolver = i1
      i1: Iterative | linsolver = fgmres; rhob = 1e4
        mg1: Multigrid
  sol2 "Solution 2" (study std2)
    v1: Variables "Dependent Variables 1"
    s1: Stationary "Stationary Solver 1"
      p1: Parametric | pname = freq; plistarr = range(1000000,1000000,10000000); punit = Hz; pcontinuationmode = no
      fc1: FullyCoupled | linsolver = i1
      i1: Iterative | linsolver = bicgstab; prefuntype = right
        mg1: Multigrid

Datasets
  dset1: Solution | solution = sol1
  dset2: Solution on selection sel1 | solution = sol1
  dset3: Solution on selection sel3 | solution = sol1
  dset4: Solution | solution = sol2
  dset5: Solution on selection sel7 | solution = sol2

Derived values
  gev1: EvalGlobal "Global Evaluation 1" | data = dset1; table = tbl1; expr = mf.VCoil_1/mf.ICoil_1
  gev2: EvalGlobal "Global Evaluation 2" | data = dset1; table = tbl2; expr = 2*mf.intWm/mf.ICoil_1^2

Tables
  tbl1: Table
    // Global Evaluation 1 (mf.VCoil_1/mf.ICoil_1)
    mf.VCoil_1/mf.ICoil_1 (Ω) | mf.VCoil_1/mf.ICoil_1 (Ω)
    0.000287512 | 0.000287512
  tbl2: Table
    // Global Evaluation 2 (2*mf.intWm/mf.ICoil_1^2)
    2*mf.intWm/mf.ICoil_1^2 (H) | 2*mf.intWm/mf.ICoil_1^2 (H)
    0.00011551 | 0.000115381

Plots
  pg1: PlotGroup3D "Magnetic Flux Density Norm (mf)" | data = dset1
    mslc1: Multislice | expr = mf.normB
  pg2: PlotGroup3D "3D Plot Group 2" | data = dset1
    vol1: Volume | data = dset2; expr = mf.VCoil
    vol2: Volume | data = dset3; expr = mf.normB
  pg3: PlotGroup3D "Magnetic Flux Density Norm (mf) 1" | data = dset4
    mslc1: Multislice | expr = mf.normB
  pg4: PlotGroup3D "3D Plot Group 4" | data = dset5
    surf1: Surface | expr = mf.normJs
  pg5: PlotGroup1D "1D Plot Group 5" | data = dset4
    glob1: Global | expr = real(mf.Zport_1); unit = Ω; descr = Lumped port impedance
  pg6: PlotGroup1D "1D Plot Group 6" | data = dset4
    glob1: Global | expr = imag(mf.Zport_1); unit = Ω; descr = Lumped port impedance